З
# Исходная функция | Задание 1
f(x) := 0.5*e^(-0.8*x) - x
# [plot: f(x) vs x]
# График функции
x1 := root(f(x), x, -10, 10) = 0.37146
# Нахождение корней
v := f(x) coeffs → [0.5*e^(-0.8*x); -1.0]
f(x) solve → 0.371459688341
# График для корня в диапазоне x1-0.5..x1+0.5
# [plot: f(x) vs x]
# Задание 3
A := [3.74, 3.36, 2.94; 4.02, 3.51, 3.04; 4.18, 3.61, 3.09]
B := [63.26; 67.51; 70.03]
R := A^-1*B = [12.3494; 5.92048; -0.959036]
lsolve(A, B) = [12.3494; 5.92048; -0.959036]
solve block
    # guess values
    x := 0
    y := 0
    z := 0
    # constraints
    3.74*x + 3.36*y + 2.94*z == 63.26
    4.02*x + 3.51*y + 3.04*z == 67.51
    4.18*x + 3.61*y + 3.09*z == 70.03
    # solver
    find(x, y, z) = [12.3494; 5.92048; -0.959036]
end solve block
