# Задание 2
n := 10
i := 1 .. 2*n
X[i] := 2*π*i/(2*n + 1)
# Кусочно-линейная интерполяция
scale := 100
j := 0 .. scale
t[j] := min(X) + j*((max(X) - min(X))/scale)
Y := [403.4; 309.0; 142.2; 42.1; 8.9; 1.56; 0.26; 0.05; 0.01; 0.0044; 0.0026; 0.0026; 0.0044; 0.01; 0.05; 0.263; 1.56; 8.95; 42.1; 142.2; 309.9]
X = [0; 0.299199; 0.598399; 0.897598; 1.1968; 1.496; 1.7952; 2.0944; 2.39359; 2.69279; 2.99199; 3.29119; 3.59039; 3.88959; 4.18879; 4.48799; 4.78719; 5.08639; 5.38559; 5.68479; 5.98399]
fintl(t) := linterp(X, Y, t)
# Интерполяция кубическим сплайном
S := cspline(X, Y)
fints(t) := interp(S, X, Y, t)
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# График сравнения интерполяций
# Задание 4
Программирование
U :=
    i ← 1
    while 1
        return i if (i*log(sqrt(5)/2 + 1/2) - log(5)/2 + 1) ≥ 1000
        i ← i + 1
U = 4782
